// SBML level 3 version 1

function function_2(a, n, K, M)
  a*M^n/(K^n + M^n);
end

function function_4(a, M, n, K, L)
  a*(1 - M^n/(K^n + M^n))*L;
end

function function_11(basal, a, M, n, K, a1, M1, K1)
  basal + a*M^n/(K^n + M^n) + a1*M1/(K1 + M1);
end

function function_3(a, M, n, K)
  a*(1 - M^n/(K^n + M^n));
end

function function_1(a, M, n, K, S)
  a*(M^n/(K^n + M^n))*S;
end

function function_5(v)
  v;
end

function function_6(E, C, S, K)
  E*C*S/(K + S);
end

function function_8(S, kloss, FT1, FT)
  S*kloss*(1 + 0.048*(FT1/FT)/(1 + FT1/FT));
end

function function_9(a, M, K)
  a*(M/(K + M));
end

function function_10(substrate, Km, V)
  V*substrate/(Km + substrate);
end

function function_7(a, M, n, K, L)
  a*(M^n/(K^n + M^n))*L;
end

function function_12(K, FT1, FT, S)
  K*(FT1/FT)*S;
end

model BIOMD0000000498_url()
  // Mitchell2013 - Liver Iron Metabolism
  // The model includes the core regulatory components of human liver iron metabolism.
  // This model is described in the article:
  // A computational model of liver iron metabolism.
  // Mitchell S, Mendes P.
  // PLoS Comput. Biol. 2013 Nov; 9(11): e1003299
  // Abstract:
  // Iron is essential for all known life due to its redox properties; however, these same properties can also lead to its toxicity in overload through the production of reactive oxygen species. Robust systemic and cellular control are required to maintain safe levels of iron, and the liver seems to be where this regulation is mainly located. Iron misregulation is implicated in many diseases, and as our understanding of iron metabolism improves, the list of iron-related disorders grows. Recent developments have resulted in greater knowledge of the fate of iron in the body and have led to a detailed map of its metabolism; however, a quantitative understanding at the systems level of how its components interact to produce tight regulation remains elusive. A mechanistic computational model of human liver iron metabolism, which includes the core regulatory components, is presented here. It was constructed based on known mechanisms of regulation and on their kinetic properties, obtained from several publications. The model was then quantitatively validated by comparing its results with previously published physiological data, and it is able to reproduce multiple experimental findings. A time course simulation following an oral dose of iron was compared to a clinical time course study and the simulation was found to recreate the dynamics and time scale of the systems response to iron challenge. A disease state simulation of haemochromatosis was created by altering a single reaction parameter that mimics a human haemochromatosis gene (HFE) mutation. The simulation provides a quantitative understanding of the liver iron overload that arises in this disease. This model supports and supplements understanding of the role of the liver as an iron sensor and provides a framework for further modelling, including simulations to identify valuable drug targets and design of experiments to improve further our knowledge of this system.
  // This model is hosted on BioModels Database and identified by: BIOMD0000000498 .
  // To cite BioModels Database, please use: BioModels Database: An enhanced, curated and annotated resource for published quantitative kinetic models .
  // To the extent possible under law, all copyright and related or neighbouring rights to this encoded model have been dedicated to the public domain worldwide. Please refer to CC0 Public Domain Dedication for more information.
  // hasProperty DOID:2352
  // biomodels.db:MODEL1302260000
  // isPartOf GO:0036333
  // hasProperty mamo:MAMO_0000046
  // hasTaxon taxonomy:9606
  // isDescribedBy pubmed:24244122

  // Compartments:
  compartment intercell = 1;
  compartment Liver_cell = 1;  // FMA:63179

  // Species:
  species species_5 in Liver_cell = 1e-9;  // CHEBI:17627
  species _2HFE_TfR2 in intercell = 0; _2HFE_TfR2 is "2HFE-TfR2";  // hasPart uniprot:Q30201; hasPart uniprot:Q9UP52
  species species_7 in Liver_cell = 5e-9;  // uniprot:P81172
  species _2HFE_TfR in intercell = 0; _2HFE_TfR is "2HFE-TfR";  // hasPart uniprot:P02786; hasPart uniprot:Q30201
  species species_10 in intercell = 3e-6;  // uniprot:Q9UP52
  species species_1 in Liver_cell = 3.56e-11;  // uniprot:P09601
  species species_2 in Liver_cell = 1.3e-6;  // CHEBI:18248
  species Fe_FT in Liver_cell = 0; Fe_FT is "Fe-FT";  // hasPart uniprot:P02792; hasPart CHEBI:18248
  species species_6 in Liver_cell = 1.16e-6;  // uniprot:P21399
  species $species_11 in intercell = 1e-7;  // CHEBI:17627
  species species_8 in intercell = 2e-7;  // uniprot:Q30201
  species $Tf_Fe_intercell in intercell = 5e-6; Tf_Fe_intercell is "Tf-Fe_intercell";  // hasPart CHEBI:18248; hasPart uniprot:P02787
  species Tf_Fe_TfR2 in intercell = 0; Tf_Fe_TfR2 is "Tf-Fe-TfR2";  // hasPart CHEBI:18248; hasPart uniprot:P02787; hasPart uniprot:Q9UP52
  species species_25 in Liver_cell = 1.66e-10;  // uniprot:P02792
  species HFE_TfR in intercell = 0; HFE_TfR is "HFE-TfR";  // hasPart uniprot:P02786; hasPart uniprot:Q30201
  species _2_Tf_Fe_TfR2 in intercell = 0; _2_Tf_Fe_TfR2 is "2(Tf-Fe)-TfR2";  // hasPart CHEBI:18248; hasPart uniprot:P02787; hasPart uniprot:Q9UP52
  species Tf_Fe_TfR1 in intercell = 0; Tf_Fe_TfR1 is "Tf-Fe-TfR1";  // hasPart CHEBI:18248; hasPart uniprot:P02787; hasPart uniprot:Q9UP52
  species species_26 in Liver_cell = 0;  // CHEBI:18248
  species species_4 in Liver_cell = 1e-9;  // uniprot:Q9NP59
  species species_3 in intercell = 4e-7;  // uniprot:P02786
  species _2_Tf_Fe_TfR1 in intercell = 0; _2_Tf_Fe_TfR1 is "2(Tf-Fe)-TfR1";  // hasPart uniprot:P02786; hasPart CHEBI:18248; hasPart uniprot:P02787

  // Parameters:
  Reaction_reaction_1_a = 2;
  Reaction_reaction_1_n = 1;
  Reaction_reaction_1_K = 3e-6;
  Reaction_reaction_2_a = 6e-12;
  Reaction_reaction_2_n = 1;
  Reaction_reaction_2_K = 1e-6;
  Reaction_reaction_4_a = 1e-9;
  Reaction_reaction_4_n = 1;
  Reaction_reaction_4_K = 5e-6;
  Reaction_reaction_8_a = 4e-11;
  Reaction_reaction_8_n = 1;
  Reaction_reaction_8_K = 1e-6;
  Reaction_reaction_9_k1 = 1.597e-5;
  Reaction_reaction_11_a = 0.0002315;
  Reaction_reaction_11_n = 5;
  Reaction_reaction_11_K = 5e-9;
  Reaction_reaction_17_basal = 0;
  Reaction_reaction_17_a = 5e-12;
  Reaction_reaction_17_n = 5;
  Reaction_reaction_17_K = 1.35e-7;
  Reaction_reaction_17_a1 = 5e-12;
  Reaction_reaction_17_K1 = 6e-7;
  Reaction_reaction_18_k1 = 0.00056;
  Reaction_reaction_6_k1 = 0.8333;
  Reaction_reaction_7_k1 = 0.8333;
  Reaction_reaction_44_k1 = 0.0004;
  Reaction_reaction_45_k1 = 4.71e10;
  Reaction_reaction_46_k1 = 22922;
  Reaction_reaction_47_k1 = 108000;
  Reaction_reaction_48_kloss = 13.112;
  Reaction_reaction_49_a = 2.312e-13;
  Reaction_reaction_49_n = 1;
  Reaction_reaction_49_K = 1e-6;
  Reaction_reaction_67_k1 = 1.203e-5;
  Reaction_reaction_73_K = 1.203e-5;
  Reaction_reaction_16_Km = 0.000125;
  Reaction_reaction_16_V = 1.034e-5;
  Reaction_reaction_19_Km = 1.78e-5;
  Reaction_reaction_19_V = 2.18e-5;
  Reaction_reaction_20_a = 2.1432e-15;
  Reaction_reaction_20_K = 1e-9;
  Reaction_reaction_33_k1 = 3.209e-5;
  Reaction_reaction_34_C = 1.77777e4;
  Reaction_reaction_34_K = 2e-6;
  reaction_20 has substance_per_time;
  reaction_33 has substance_per_time;
  reaction_67 has substance_per_time;
  reaction_11 has substance_per_time;
  reaction_47 has substance_per_time;
  reaction_49 has substance_per_time;
  reaction_19 has substance_per_time;
  reaction_17 has substance_per_time;
  reaction_8 has substance_per_time;
  reaction_2 has substance_per_time;
  reaction_44 has substance_per_time;
  reaction_1 has substance_per_time;
  reaction_46 has substance_per_time;
  reaction_6 has substance_per_time;
  reaction_7 has substance_per_time;
  reaction_34 has substance_per_time;
  reaction_73 has substance_per_time;
  reaction_45 has substance_per_time;
  reaction_18 has substance_per_time;
  reaction_16 has substance_per_time;
  reaction_9 has substance_per_time;
  reaction_4 has substance_per_time;
  reaction_48 has substance_per_time;

  // Assignment rules:
  parameter_1 := piecewise(1e-7, -5e-13*(time - 40000)^2 + 0.0001 < 1e-7, -5e-13*(time - 40000)^2 + 0.0001);
  reaction_20 := Liver_cell*function_9(Reaction_reaction_20_a, species_5, Reaction_reaction_20_K);
  reaction_33 := Liver_cell*Reaction_reaction_33_k1*species_1;
  reaction_67 := Liver_cell*Reaction_reaction_67_k1*species_25;
  reaction_11 := Liver_cell*function_7(Reaction_reaction_11_a, species_7, Reaction_reaction_11_n, Reaction_reaction_11_K, species_4);
  reaction_47 := Liver_cell*Reaction_reaction_47_k1*Fe_FT;
  reaction_49 := Liver_cell*function_3(Reaction_reaction_49_a, species_6, Reaction_reaction_49_n, Reaction_reaction_49_K);
  reaction_19 := function_10(species_5, Reaction_reaction_19_Km, Reaction_reaction_19_V);
  reaction_17 := Liver_cell*function_11(Reaction_reaction_17_basal, Reaction_reaction_17_a, _2HFE_TfR2, Reaction_reaction_17_n, Reaction_reaction_17_K, Reaction_reaction_17_a1, _2_Tf_Fe_TfR2, Reaction_reaction_17_K1);
  reaction_8 := Liver_cell*function_3(Reaction_reaction_8_a, species_2, Reaction_reaction_8_n, Reaction_reaction_8_K);
  reaction_2 := intercell*function_2(Reaction_reaction_2_a, Reaction_reaction_2_n, Reaction_reaction_2_K, species_6);
  reaction_44 := Liver_cell*Reaction_reaction_44_k1*species_2;
  reaction_1 := function_1(Reaction_reaction_1_a, species_4, Reaction_reaction_1_n, Reaction_reaction_1_K, species_2);
  reaction_46 := Liver_cell*Reaction_reaction_46_k1*Fe_FT;
  reaction_6 := Reaction_reaction_6_k1*_2_Tf_Fe_TfR1;
  reaction_7 := Reaction_reaction_7_k1*_2_Tf_Fe_TfR2;
  reaction_34 := Liver_cell*function_6(species_1, Reaction_reaction_34_C, species_5, Reaction_reaction_34_K);
  reaction_73 := Liver_cell*function_12(Reaction_reaction_73_K, species_26, species_25, species_25);
  reaction_45 := Liver_cell*Reaction_reaction_45_k1*species_2*species_25;
  reaction_18 := Liver_cell*Reaction_reaction_18_k1*species_7;
  reaction_16 := function_10(species_11, Reaction_reaction_16_Km, Reaction_reaction_16_V);
  reaction_9 := Liver_cell*Reaction_reaction_9_k1*species_6;
  reaction_4 := Liver_cell*function_3(Reaction_reaction_4_a, species_6, Reaction_reaction_4_n, Reaction_reaction_4_K);
  reaction_48 := Liver_cell*function_8(species_26, Reaction_reaction_48_kloss, species_26, species_25);

  // Reactions:
  reaction_22: HFE_TfR -> species_8 + species_3; intercell*reaction_22_k1*HFE_TfR;
    reaction_22_k1 = 0.08;
  reaction_27: $Tf_Fe_intercell + species_10 -> Tf_Fe_TfR2; intercell*reaction_27_k1*Tf_Fe_intercell*species_10;
    reaction_27_k1 = 222390;
  reaction_5: _2HFE_TfR -> ; intercell*reaction_5_k1*_2HFE_TfR;
    reaction_5_k1 = 8.37e-7;
  reaction_12: species_8 -> ; intercell*reaction_12_k1*species_8;
    reaction_12_k1 = 6.418e-5;
  reaction_36: _2_Tf_Fe_TfR2 -> Tf_Fe_TfR2 + $Tf_Fe_intercell; intercell*reaction_36_k1*_2_Tf_Fe_TfR2;
    reaction_36_k1 = 0.024;
  reaction_29: Tf_Fe_TfR1 + $Tf_Fe_intercell -> _2_Tf_Fe_TfR1; intercell*reaction_29_k1*Tf_Fe_TfR1*Tf_Fe_intercell;
    reaction_29_k1 = 121400;
  reaction_30: _2_Tf_Fe_TfR1 -> Tf_Fe_TfR1 + $Tf_Fe_intercell; intercell*reaction_30_k1*_2_Tf_Fe_TfR1;
    reaction_30_k1 = 0.003535;
  reaction_28: Tf_Fe_TfR2 -> $Tf_Fe_intercell + species_10; intercell*reaction_28_k1*Tf_Fe_TfR2;
    reaction_28_k1 = 0.0061;
  reaction_23: $Tf_Fe_intercell + species_3 -> Tf_Fe_TfR1; intercell*reaction_23_k1*Tf_Fe_intercell*species_3;
    reaction_23_k1 = 837400;
  reaction_31: HFE_TfR + species_8 -> _2HFE_TfR; intercell*reaction_31_k1*HFE_TfR*species_8;
    reaction_31_k1 = 1102000;
  reaction_24: Tf_Fe_TfR1 -> $Tf_Fe_intercell + species_3; intercell*reaction_24_k1*Tf_Fe_TfR1;
    reaction_24_k1 = 0.0009142;
  reaction_3: species_3 -> ; intercell*reaction_3_k1*species_3;
    reaction_3_k1 = 8.37e-6;
  reaction_15: species_10 -> ; intercell*function_4(a, Tf_Fe_intercell, n, K, species_10);  // modifiers: Tf_Fe_intercell
    a = 3.2e-5; n = 1; K = 2.5e-6;
  reaction_26: _2HFE_TfR2 -> 2 species_8 + species_10; intercell*reaction_26_k1*_2HFE_TfR2;
    reaction_26_k1 = 0.0018;
  reaction_35: Tf_Fe_TfR2 + $Tf_Fe_intercell -> _2_Tf_Fe_TfR2; intercell*reaction_35_k1*Tf_Fe_TfR2*Tf_Fe_intercell;
    reaction_35_k1 = 69600;
  reaction_10: _2HFE_TfR2 -> ; intercell*reaction_10_k1*_2HFE_TfR2;
    reaction_10_k1 = 8.37e-5;
  reaction_25: 2 species_8 + species_10 -> _2HFE_TfR2; intercell*reaction_25_k1*species_8^2*species_10;
    reaction_25_k1 = 3.9438e11;
  reaction_32: _2HFE_TfR -> HFE_TfR + species_8; intercell*reaction_32_k1*_2HFE_TfR;
    reaction_32_k1 = 0.08;
  reaction_21: species_8 + species_3 -> HFE_TfR; intercell*reaction_21_k1*species_8*species_3;
    reaction_21_k1 = 1102000;
  reaction_14: -> species_10; intercell*function_5(reaction_14_v);
    reaction_14_v = 3e-11;
  reaction_13: -> species_8; intercell*function_5(reaction_13_v);
    reaction_13_v = 2.3469e-11;

  // Unit definitions:
  unit substance_per_volume = mole / litre;
  unit substance_per_time = mole / second;
end
